folder simulations: version=36; creator=Apsim 7.7-r3690
  folder SWcon
    simulation swcon_Awatere191
      metfile met: filename=lincoln.met
      clock
        start_date = 01/06/2009  # Enter the start date of the simulation
        end_date = 30/05/2010  # Enter the end date of the simulation
      summaryfile
      area paddock
        surfaceom surface organic matter
          PoolName = barley  # Organic Matter pool name
          type = barley  # Organic Matter type
          mass = 500  # Initial surface residue (kg/ha)
          cnr = 80  # C:N ratio of initial residue
          standing_fraction = 1  # Fraction of residue standing
        outputfile: filename=swcon_Awatere191.out; title=swcon_Awatere191
          variables
            variables: dd/mm/yyyy as Date, rain, es, sw(6-10), dul(6-10), sat(6-10)
          events Reporting Frequency: event=daily
        manager ClimateControl
          # Climate Control Window
          date1 = 1-jun  # Enter window START date (dd-mmm)
          date2 = 15-jun  # Enter window END date (dd-mmm)
          # Climate Change Parameters
          MaxtChange = 1  # Change in maximum temperature (oC)
          MintChange = 1  # Change in minimum temperature (oC)
          RainChange = -10  # Relative change in daily rainfall (%)
          RadnChange = 0  # Relative change in daily radiation (%)
          CO2 = 350  # Atmospheric CO2 Concentration (ppm)
          on prenewmet:
```
if (date_within('[date1], [date2]') = 1) then
   maxt = 4
   mint = 0
   rain = 3000
   radn = 0
   vp = 10
endif

if (date_within('[date1], [date2]') = 0) then
   maxt = 4
   mint = 0
   rain = 0
   radn = 0
   vp = 10
endif
```
          on Init:
```
co2 = [CO2]
tav = tav + ([MaxtChange] + [MintChange]) / 2
```
        Soil Awatere_19a1: SoilType=Typic Fluvial Recent Soils; Latitude=-41; Longitude=-82; YearOfSampling=0
          LayerStructure
            Thickness=[10, 20, 30, 40, 122, 122, 122, 122, 122, 122, 122, 122, 122, 122, 122, 122, 122, 122, 122, 50, 20]
          Water: Thickness=[2000]; BD=[1.1607]; AirDry=[0.030525]; LL15=[0.033]; DUL=[0.149]; SAT=[0.52266]; KS=[2400]
            SoilCrop Ryegrass_Clover: Thickness=[2000]; LL=[0.033]; KL=[0.0001983]; XF=[0.0463284]
            SoilCrop Wheat: Thickness=[2000]; LL=[0.033]; KL=[0.2]; XF=[1]
          SoilOrganicMatter: RootCN=40; RootWt=1000; SoilCN=11; EnrACoeff=7.4; EnrBCoeff=0.2
            Thickness  OC        FBiom      FInert
            10.0       4.7       0.0692655  0.569646
            20.0       3.21644   0.0340955  0.725594
            30.0       0.608231  0.0153764  0.87038
            40.0       0.224825  0.0106584  0.954641
            122.0      0.200038  0.0100051  0.996007
            122.0      0.2       0.01       0.999897
            122.0      0.2       0.01       0.999997
            122.0      0.2       0.01       1
            122.0      0.2       0.01       1
            122.0      0.2       0.01       1
            122.0      0.2       0.01       1
            122.0      0.2       0.01       1
            122.0      0.2       0.01       1
            122.0      0.2       0.01       1.0
            122.0      0.2       0.01       1.0
            122.0      0.2       0.01       1.0
            122.0      0.2       0.01       1.0
            122.0      0.2       0.01       1.0
            122.0      0.2       0.01       1.0
            50.0       0.2       0.01       1.0
            20.0       0.2       0.01       1.0
          Analysis: Thickness=[2000.0]; Rocks=[0.0]; PH=[7.0]; CEC=[11.779]; ParticleSizeSand=[88.0]; ParticleSizeSilt=[10.0]; ParticleSizeClay=[2.0]
          Sample Initial nitrogen: Thickness=[2000]; NO3=[1000]; NH4=[3]; NO3Units=kgha; NH4Units=ppm; SWUnits=Volumetric; OCUnits=Total; PHUnits=Water
          InitialWater Initial water: FractionFull=1; PercentMethod=FilledFromTop
          Swim
            Salb = 0.13  # Bare Soil Albedo
            CN2Bare = 75  # Bare Soil Runoff Curve Number
            CNRed = 20  # Max. Reduction in Curve Number due to cover
            CNCov = 0.8  # Cover for max Curve Number reduction
            KDul = 0.1  # Hydraulic Conductivity at DUL (mm/d)
            PSIDul = -100  # Matric Potential at DUL (cm)
            VC = true  # Vapour Conductivity Calculations (on/off)
            DTmin = 0.0  # Minimum Timestep (min)
            DTmax = 1440.0  # Maximum Timestep (min)
            MaxWaterIncrement = 10  # Maximum Water Increment (mm)
            SpaceWeightingFactor = 0
            SoluteSpaceWeightingFactor = 0.0
            Diagnostics = false  # Diagnostic Information?
            SwimSoluteParameters: Thickness=[2000.0]; ThicknessUnits=mm; NO3Exco=[0.0]; NO3FIP=[1.0]; NH4Exco=[100.0]; NH4FIP=[1.0]; UreaExco=[0.0]; UreaFIP=[1.0]; ClExco=[0.0]; ClFIP=[1.0]
              Dis = 15  # Dispersivity - dis ((cm^2/h)/(cm/h)^p)
              Disp = 1  # Dispersivity Power - disp
              A = 1.0  # Tortuosity Constant - a
              DTHC = 0.0  # Tortuoisty Offset - dthc
              DTHP = 1.0  # Tortuoisty Power - dthp
              WaterTableCl = 0  # Water Table Cl Concentration (ppm)
              WaterTableNO3 = 0.0  # Water Table NO3 Concentration (ppm)
              WaterTableNH4 = 0.0  # Water Table NH4 Concentration (ppm)
              WaterTableUrea = 0.0  # Water Table Urea Concentration (ppm)
    simulation swcon_Waikuku271
      metfile met: filename=lincoln.met
      clock
        start_date = 01/06/2009  # Enter the start date of the simulation
        end_date = 30/05/2010  # Enter the end date of the simulation
      summaryfile
      area paddock
        surfaceom surface organic matter
          PoolName = barley  # Organic Matter pool name
          type = barley  # Organic Matter type
          mass = 500  # Initial surface residue (kg/ha)
          cnr = 80  # C:N ratio of initial residue
          standing_fraction = 1  # Fraction of residue standing
        Soil Waikuku_27a1: SoilType=Typic Sandy Brown Soils; Latitude=-41; Longitude=-82
          LayerStructure
            Thickness=[10.0, 20.0, 30.0, 40.0, 122.0, 122.0, 122.0, 122.0, 122.0, 122.0, 122.0, 122.0, 122.0, 122.0, 122.0, 122.0, 122.0, 122.0, 122.0, 50.0, 20.0]
          Water: Thickness=[2000]; BD=[1.4098]; AirDry=[0.04255]; LL15=[0.046]; DUL=[0.15]; SAT=[0.43524]; KS=[1200]
            SoilCrop Ryegrass_Clover: Thickness=[2000]; LL=[0.046]; KL=[0.000223088]; XF=[0.0463284]
            SoilCrop Wheat: Thickness=[2000]; LL=[0.046]; KL=[0.2]; XF=[1]
          SoilOrganicMatter: same as SWcon.swcon_Awatere191.paddock.Awatere_19a1.SoilOrganicMatter
          Analysis: Thickness=[2000.0]; Rocks=[0.0]; PH=[7.0]; CEC=[12.6135]; ParticleSizeSand=[84.5]; ParticleSizeSilt=[10.5]; ParticleSizeClay=[5.0]
          Sample Initial nitrogen: Thickness=[2000]; NO3=[1000]; NH4=[3]; NO3Units=kgha; NH4Units=ppm; SWUnits=Volumetric; OCUnits=Total; PHUnits=Water
          InitialWater Initial water: FractionFull=1; PercentMethod=FilledFromTop
          Swim: same as SWcon.swcon_Awatere191.paddock.Awatere_19a1.Swim
        outputfile: filename=swcon_Waikuku271.out; title=swcon_Waikuku271
          variables
            variables: dd/mm/yyyy as Date, rain, es, sw(6-10), dul(6-10), sat(6-10)
          events Reporting Frequency: event=daily
        manager ClimateControl: same as SWcon.swcon_Awatere191.paddock.ClimateControl
    simulation swcon_Dannevirke401
      metfile met: filename=lincoln.met
      clock
        start_date = 01/06/2009  # Enter the start date of the simulation
        end_date = 30/05/2010  # Enter the end date of the simulation
      summaryfile
      area paddock
        surfaceom surface organic matter
          PoolName = barley  # Organic Matter pool name
          type = barley  # Organic Matter type
          mass = 500  # Initial surface residue (kg/ha)
          cnr = 80  # C:N ratio of initial residue
          standing_fraction = 1  # Fraction of residue standing
        Soil Dannevirke_40a1: SoilType=Typic Orthic Allophanic Soils; Latitude=-41; Longitude=-82
          LayerStructure
            Thickness=[10.0, 20.0, 30.0, 40.0, 122.0, 122.0, 122.0, 122.0, 122.0, 122.0, 122.0, 122.0, 122.0, 122.0, 122.0, 122.0, 122.0, 122.0, 122.0, 50.0, 20.0]
          Water: Thickness=[2000]; BD=[0.85595]; AirDry=[0.289525]; LL15=[0.313]; DUL=[0.56]; SAT=[0.62961]; KS=[960]
            SoilCrop Ryegrass_Clover: Thickness=[2000]; LL=[0.313]; KL=[0.000223088]; XF=[0.0225505]
            SoilCrop Wheat: Thickness=[2000]; LL=[0.313]; KL=[0.2]; XF=[1]
          SoilOrganicMatter: same as SWcon.swcon_Awatere191.paddock.Awatere_19a1.SoilOrganicMatter
          Analysis: Thickness=[2000.0]; Rocks=[0.0]; PH=[7.0]; CEC=[20.404]; ParticleSizeSand=[13.0]; ParticleSizeSilt=[67.0]; ParticleSizeClay=[20.0]
          Sample Initial nitrogen: Thickness=[2000]; NO3=[1000]; NH4=[3]; NO3Units=kgha; NH4Units=ppm; SWUnits=Volumetric; OCUnits=Total; PHUnits=Water
          InitialWater Initial water: FractionFull=1; PercentMethod=FilledFromTop
          Swim: same as SWcon.swcon_Awatere191.paddock.Awatere_19a1.Swim
        outputfile: filename=swcon_Dannevirke401.out; title=swcon_Dannevirke401
          variables
            variables: dd/mm/yyyy as Date, rain, es, sw(6-10), dul(6-10), sat(6-10)
          events Reporting Frequency: event=daily
        manager ClimateControl: same as SWcon.swcon_Awatere191.paddock.ClimateControl
    simulation swcon_Dannevirke391
      metfile met: filename=lincoln.met
      clock
        start_date = 01/06/2009  # Enter the start date of the simulation
        end_date = 30/05/2010  # Enter the end date of the simulation
      summaryfile
      area paddock
        surfaceom surface organic matter
          PoolName = barley  # Organic Matter pool name
          type = barley  # Organic Matter type
          mass = 500  # Initial surface residue (kg/ha)
          cnr = 80  # C:N ratio of initial residue
          standing_fraction = 1  # Fraction of residue standing
        Soil Dannevirke_39a1: SoilType=Typic Orthic Allophanic Soils; Latitude=-41; Longitude=-82; YearOfSampling=0
          LayerStructure
            Thickness=[10.0, 20.0, 30.0, 40.0, 122.0, 122.0, 122.0, 122.0, 122.0, 122.0, 122.0, 122.0, 122.0, 122.0, 122.0, 122.0, 122.0, 122.0, 122.0, 50.0, 20.0]
          Water: Thickness=[2000]; BD=[0.87715]; AirDry=[0.308025]; LL15=[0.333]; DUL=[0.559]; SAT=[0.62217]; KS=[336]
            SoilCrop Ryegrass_Clover: Thickness=[2000]; LL=[0.333]; KL=[0.0001983]; XF=[0.0286672]
            SoilCrop Wheat: Thickness=[2000]; LL=[0.333]; KL=[0.2]; XF=[1]
          SoilOrganicMatter: same as SWcon.swcon_Awatere191.paddock.Awatere_19a1.SoilOrganicMatter
          Analysis: Thickness=[2000.0]; Rocks=[0.0]; PH=[7.0]; CEC=[20.935]; ParticleSizeSand=[20.0]; ParticleSizeSilt=[55.0]; ParticleSizeClay=[25.0]
          Sample Initial nitrogen: Thickness=[2000]; NO3=[1000]; NH4=[3]; NO3Units=kgha; NH4Units=ppm; SWUnits=Volumetric; OCUnits=Total; PHUnits=Water
          InitialWater Initial water: FractionFull=1; PercentMethod=FilledFromTop
          Swim: Salb=0.13; CN2Bare=75; CNRed=20; CNCov=0.8; KDul=0.1; PSIDul=-100; VC=true; DTmin=0; DTmax=1440; MaxWaterIncrement=10; SpaceWeightingFactor=0; SoluteSpaceWeightingFactor=0; Diagnostics=false
            SwimSoluteParameters: same as SWcon.swcon_Awatere191.paddock.Awatere_19a1.Swim.SwimSoluteParameters
        outputfile: filename=swcon_Dannevirke391.out; title=swcon_Dannevirke391
          variables
            variables: dd/mm/yyyy as Date, rain, es, sw(6-10), dul(6-10), sat(6-10)
          events Reporting Frequency: event=daily
        manager ClimateControl: same as SWcon.swcon_Awatere191.paddock.ClimateControl
    simulation swcon_Wakanui_461
      metfile met: filename=lincoln.met
      clock
        start_date = 01/06/2009  # Enter the start date of the simulation
        end_date = 30/05/2010  # Enter the end date of the simulation
      summaryfile
      area paddock
        surfaceom surface organic matter
          PoolName = barley  # Organic Matter pool name
          type = barley  # Organic Matter type
          mass = 500  # Initial surface residue (kg/ha)
          cnr = 80  # C:N ratio of initial residue
          standing_fraction = 1  # Fraction of residue standing
        Soil Wakanui_46a1: SoilType=Mottled Immature Pallic Soils; Latitude=-41; Longitude=-82
          LayerStructure
            Thickness=[10.0, 20.0, 30.0, 40.0, 122.0, 122.0, 122.0, 122.0, 122.0, 122.0, 122.0, 122.0, 122.0, 122.0, 122.0, 122.0, 122.0, 122.0, 122.0, 50.0, 20.0]
          Water: Thickness=[2000]; BD=[1.5423]; AirDry=[0.191475]; LL15=[0.207]; DUL=[0.367]; SAT=[0.38874]; KS=[24]
            SoilCrop Ryegrass_Clover: Thickness=[2000]; LL=[0.207]; KL=[0.000123938]; XF=[0.316004]
            SoilCrop Wheat: Thickness=[2000]; LL=[0.207]; KL=[0.2]; XF=[1]
          SoilOrganicMatter: same as SWcon.swcon_Awatere191.paddock.Awatere_19a1.SoilOrganicMatter
          Analysis: Thickness=[2000.0]; Rocks=[0.0]; PH=[7.0]; CEC=[21.673]; ParticleSizeSand=[6.0]; ParticleSizeSilt=[70.0]; ParticleSizeClay=[24.0]
          Sample Initial nitrogen: Thickness=[2000]; NO3=[1000]; NH4=[3]; NO3Units=kgha; NH4Units=ppm; SWUnits=Volumetric; OCUnits=Total; PHUnits=Water
          InitialWater Initial water: FractionFull=1; PercentMethod=FilledFromTop
          Swim: same as SWcon.swcon_Awatere191.paddock.Awatere_19a1.Swim
        outputfile: filename=swcon_Wakanui_461.out; title=swcon_Wakanui_461
          variables
            variables: dd/mm/yyyy as Date, rain, es, sw(6-10), dul(6-10), sat(6-10)
          events Reporting Frequency: event=daily
        manager ClimateControl: same as SWcon.swcon_Awatere191.paddock.ClimateControl
    simulation swcon_Oronoko1281
      metfile met: filename=lincoln.met
      clock
        start_date = 01/06/2009  # Enter the start date of the simulation
        end_date = 30/05/2010  # Enter the end date of the simulation
      summaryfile
      area paddock
        surfaceom surface organic matter
          PoolName = barley  # Organic Matter pool name
          type = barley  # Organic Matter type
          mass = 500  # Initial surface residue (kg/ha)
          cnr = 80  # C:N ratio of initial residue
          standing_fraction = 1  # Fraction of residue standing
        Soil Oronoko_128a1: SoilType=Typic Orthic Brown Soils; Latitude=-41; Longitude=-82; YearOfSampling=0
          LayerStructure
            Thickness=[10.0, 20.0, 30.0, 40.0, 122.0, 122.0, 122.0, 122.0, 122.0, 122.0, 122.0, 122.0, 122.0, 122.0, 122.0, 122.0, 122.0, 122.0, 122.0, 50.0, 20.0]
          Water: Thickness=[2000]; BD=[1.35945]; AirDry=[0.217375]; LL15=[0.235]; DUL=[0.382]; SAT=[0.45291]; KS=[480]
            SoilCrop Ryegrass_Clover: Thickness=[2000]; LL=[0.235]; KL=[0.0001983]; XF=[0.0463284]
            SoilCrop Wheat: Thickness=[2000]; LL=[0.235]; KL=[0.2]; XF=[1]
          SoilOrganicMatter: same as SWcon.swcon_Awatere191.paddock.Awatere_19a1.SoilOrganicMatter
          Analysis: Thickness=[2000.0]; Rocks=[0.0]; PH=[7.0]; CEC=[22.27]; ParticleSizeSand=[15.0]; ParticleSizeSilt=[55.0]; ParticleSizeClay=[30.0]
          Sample Initial nitrogen: Thickness=[2000]; NO3=[1000]; NH4=[3]; NO3Units=kgha; NH4Units=ppm; SWUnits=Volumetric; OCUnits=Total; PHUnits=Water
          InitialWater Initial water: FractionFull=1; PercentMethod=FilledFromTop
          Swim: same as SWcon.swcon_Awatere191.paddock.Awatere_19a1.Swim
        outputfile: filename=swcon_Oronoko1281.out; title=swcon_Oronoko1281
          variables
            variables: dd/mm/yyyy as Date, rain, es, sw(6-10), dul(6-10), sat(6-10)
          events Reporting Frequency: event=daily
        manager ClimateControl: same as SWcon.swcon_Awatere191.paddock.ClimateControl
    simulation swcon_Oronoko1291
      metfile met: filename=lincoln.met
      clock
        start_date = 01/06/2009  # Enter the start date of the simulation
        end_date = 30/05/2010  # Enter the end date of the simulation
      summaryfile
      area paddock
        surfaceom surface organic matter
          PoolName = barley  # Organic Matter pool name
          type = barley  # Organic Matter type
          mass = 500  # Initial surface residue (kg/ha)
          cnr = 80  # C:N ratio of initial residue
          standing_fraction = 1  # Fraction of residue standing
        Soil Oronoko_129a1: SoilType=Typic Orthic Brown Soils; Latitude=-41; Longitude=-82
          LayerStructure
            Thickness=[10.0, 20.0, 30.0, 40.0, 122.0, 122.0, 122.0, 122.0, 122.0, 122.0, 122.0, 122.0, 122.0, 122.0, 122.0, 122.0, 122.0, 122.0, 122.0, 50.0, 20.0]
          Water: Thickness=[2000]; BD=[1.47605]; AirDry=[0.0888]; LL15=[0.096]; DUL=[0.265]; SAT=[0.41199]; KS=[960]
            SoilCrop Ryegrass_Clover: Thickness=[2000]; LL=[0.096]; KL=[0.000223088]; XF=[0.0225505]
            SoilCrop Wheat: Thickness=[2000]; LL=[0.096]; KL=[0.2]; XF=[1]
          SoilOrganicMatter: same as SWcon.swcon_Awatere191.paddock.Awatere_19a1.SoilOrganicMatter
          Analysis: Thickness=[2000.0]; Rocks=[0.0]; PH=[7.0]; CEC=[16.26]; ParticleSizeSand=[45.0]; ParticleSizeSilt=[45.0]; ParticleSizeClay=[10.0]
          Sample Initial nitrogen: Thickness=[2000]; NO3=[1000]; NH4=[3]; NO3Units=kgha; NH4Units=ppm; SWUnits=Volumetric; OCUnits=Total; PHUnits=Water
          InitialWater Initial water: FractionFull=1; PercentMethod=FilledFromTop
          Swim: same as SWcon.swcon_Awatere191.paddock.Awatere_19a1.Swim
        outputfile: filename=swcon_Oronoko1291.out; title=swcon_Oronoko1291
          variables
            variables: dd/mm/yyyy as Date, rain, es, sw(6-10), dul(6-10), sat(6-10)
          events Reporting Frequency: event=daily
        manager ClimateControl: same as SWcon.swcon_Awatere191.paddock.ClimateControl
    simulation swcon_Fork81
      metfile met: filename=lincoln.met
      clock
        start_date = 01/06/2009  # Enter the start date of the simulation
        end_date = 30/05/2010  # Enter the end date of the simulation
      summaryfile
      area paddock
        surfaceom surface organic matter
          PoolName = barley  # Organic Matter pool name
          type = barley  # Organic Matter type
          mass = 500  # Initial surface residue (kg/ha)
          cnr = 80  # C:N ratio of initial residue
          standing_fraction = 1  # Fraction of residue standing
        Soil Fork_8a1: SoilType=Typic Orthic Brown Soils; Latitude=-41; Longitude=-82
          LayerStructure
            Thickness=[10.0, 20.0, 30.0, 40.0, 122.0, 122.0, 122.0, 122.0, 122.0, 122.0, 122.0, 122.0, 122.0, 122.0, 122.0, 122.0, 122.0, 122.0, 122.0, 50.0, 20.0]
          Water: Thickness=[2000]; BD=[2.253984]; AirDry=[0.012728]; LL15=[0.01376]; DUL=[0.0464]; SAT=[0.138979]; KS=[2400]
            SoilCrop Ryegrass_Clover: Thickness=[2000]; LL=[0.01376]; KL=[0.0001983]; XF=[0.0588949]
            SoilCrop Wheat: Thickness=[2000]; LL=[0.014]; KL=[0.2]; XF=[1]
          SoilOrganicMatter: same as SWcon.swcon_Awatere191.paddock.Awatere_19a1.SoilOrganicMatter
          Analysis: Thickness=[2000.0]; Rocks=[68.0]; PH=[7.0]; CEC=[12.38]; ParticleSizeSand=[85.0]; ParticleSizeSilt=[11.0]; ParticleSizeClay=[4.0]
          Sample Initial nitrogen: Thickness=[2000]; NO3=[1000]; NH4=[3]; NO3Units=kgha; NH4Units=ppm; SWUnits=Volumetric; OCUnits=Total; PHUnits=Water
          InitialWater Initial water: FractionFull=1; PercentMethod=FilledFromTop
          Swim: same as SWcon.swcon_Awatere191.paddock.Awatere_19a1.Swim
        outputfile: filename=swcon_Fork81.out; title=swcon_Fork81
          variables
            variables: dd/mm/yyyy as Date, rain, es, sw(6-10), dul(6-10), sat(6-10)
          events Reporting Frequency: event=daily
        manager ClimateControl: same as SWcon.swcon_Awatere191.paddock.ClimateControl
    simulation swcon_Glasnevin131
      metfile met: filename=lincoln.met
      clock
        start_date = 01/06/2009  # Enter the start date of the simulation
        end_date = 30/05/2010  # Enter the end date of the simulation
      summaryfile
      area paddock
        surfaceom surface organic matter
          PoolName = barley  # Organic Matter pool name
          type = barley  # Organic Matter type
          mass = 500  # Initial surface residue (kg/ha)
          cnr = 80  # C:N ratio of initial residue
          standing_fraction = 1  # Fraction of residue standing
        Soil Glasnevin_13a1: SoilType=Typic Immature Pallic Soils; Latitude=-41; Longitude=-82
          LayerStructure
            Thickness=[10.0, 20.0, 30.0, 40.0, 122.0, 122.0, 122.0, 122.0, 122.0, 122.0, 122.0, 122.0, 122.0, 122.0, 122.0, 122.0, 122.0, 122.0, 122.0, 50.0, 20.0]
          Water: Thickness=[2000]; BD=[2.03122]; AirDry=[0.0814]; LL15=[0.088]; DUL=[0.157]; SAT=[0.217155]; KS=[120]
            SoilCrop Ryegrass_Clover: Thickness=[2000]; LL=[0.088]; KL=[0.000185906]; XF=[0.0748701]
            SoilCrop Wheat: Thickness=[2000]; LL=[0.088]; KL=[0.2]; XF=[1]
          SoilOrganicMatter: same as SWcon.swcon_Awatere191.paddock.Awatere_19a1.SoilOrganicMatter
          Analysis: Thickness=[2000.0]; Rocks=[50.0]; PH=[7.0]; CEC=[19.26]; ParticleSizeSand=[45.0]; ParticleSizeSilt=[30.0]; ParticleSizeClay=[25.0]
          Sample Initial nitrogen: Thickness=[2000]; NO3=[1000]; NH4=[3]; NO3Units=kgha; NH4Units=ppm; SWUnits=Volumetric; OCUnits=Total; PHUnits=Water
          InitialWater Initial water: FractionFull=1; PercentMethod=FilledFromTop
          Swim: same as SWcon.swcon_Awatere191.paddock.Awatere_19a1.Swim
        outputfile: filename=swcon_Glasnevin131.out; title=swcon_Glasnevin131
          variables
            variables: dd/mm/yyyy as Date, rain, es, sw(6-10), dul(6-10), sat(6-10)
          events Reporting Frequency: event=daily
        manager ClimateControl: same as SWcon.swcon_Awatere191.paddock.ClimateControl
    simulation swcon_Mandamus321
      metfile met: filename=lincoln.met
      clock
        start_date = 01/06/2009  # Enter the start date of the simulation
        end_date = 30/05/2010  # Enter the end date of the simulation
      summaryfile
      area paddock
        surfaceom surface organic matter
          PoolName = barley  # Organic Matter pool name
          type = barley  # Organic Matter type
          mass = 500  # Initial surface residue (kg/ha)
          cnr = 80  # C:N ratio of initial residue
          standing_fraction = 1  # Fraction of residue standing
        Soil Mandamus_32a1: SoilType=Typic Orthic Brown Soils; Latitude=-41; Longitude=-82
          LayerStructure
            Thickness=[10.0, 20.0, 30.0, 40.0, 122.0, 122.0, 122.0, 122.0, 122.0, 122.0, 122.0, 122.0, 122.0, 122.0, 122.0, 122.0, 122.0, 122.0, 122.0, 50.0, 20.0]
          Water: Thickness=[2000]; BD=[2.14438]; AirDry=[0.03071]; LL15=[0.0332]; DUL=[0.0904]; SAT=[0.177444]; KS=[1200]
            SoilCrop Ryegrass_Clover: Thickness=[2000]; LL=[0.0332]; KL=[0.000223088]; XF=[0.0225505]
            SoilCrop Wheat: Thickness=[2000]; LL=[0.033]; KL=[0.2]; XF=[1]
          SoilOrganicMatter: same as SWcon.swcon_Awatere191.paddock.Awatere_19a1.SoilOrganicMatter
          Analysis: Thickness=[2000.0]; Rocks=[60.0]; PH=[7.0]; CEC=[14.585]; ParticleSizeSand=[70.0]; ParticleSizeSilt=[20.0]; ParticleSizeClay=[10.0]
          Sample Initial nitrogen: Thickness=[2000]; NO3=[1000]; NH4=[3]; NO3Units=kgha; NH4Units=ppm; SWUnits=Volumetric; OCUnits=Total; PHUnits=Water
          InitialWater Initial water: FractionFull=1; PercentMethod=FilledFromTop
          Swim: same as SWcon.swcon_Awatere191.paddock.Awatere_19a1.Swim
        outputfile: filename=swcon_Mandamus321.out; title=swcon_Mandamus321
          variables
            variables: dd/mm/yyyy as Date, rain, es, sw(6-10), dul(6-10), sat(6-10)
          events Reporting Frequency: event=daily
        manager ClimateControl: same as SWcon.swcon_Awatere191.paddock.ClimateControl
    simulation swcon_ApsimVYc11
      metfile met: filename=lincoln.met
      clock
        start_date = 01/06/2009  # Enter the start date of the simulation
        end_date = 30/05/2010  # Enter the end date of the simulation
      summaryfile
      area paddock
        surfaceom surface organic matter
          PoolName = barley  # Organic Matter pool name
          type = barley  # Organic Matter type
          mass = 500  # Initial surface residue (kg/ha)
          cnr = 80  # C:N ratio of initial residue
          standing_fraction = 1  # Fraction of residue standing
        Soil ApsimVYc_1a1: SoilType=Acidic Orthic Brown Soils; Latitude=-41; Longitude=-82
          LayerStructure
            Thickness=[10, 20, 30, 40, 122, 122, 122, 122, 122, 122, 122, 122, 122, 122, 122, 122, 122, 122, 122, 50, 20]
          Water: Thickness=[2000]; BD=[2.0215525]; AirDry=[0.111555]; LL15=[0.1206]; DUL=[0.17505]; SAT=[0.22055]; KS=[48]
            SoilCrop Ryegrass_Clover: Thickness=[2000]; LL=[0.1206]; KL=[0.000185906]; XF=[0.0588949]
            SoilCrop Wheat: Thickness=[2000]; LL=[0.021]; KL=[0.2]; XF=[1]
          SoilOrganicMatter: same as SWcon.swcon_Awatere191.paddock.Awatere_19a1.SoilOrganicMatter
          Analysis: Thickness=[2000.0]; Rocks=[55.0]; PH=[7.0]; CEC=[24.87]; ParticleSizeSand=[15.0]; ParticleSizeSilt=[42.0]; ParticleSizeClay=[43.0]
          Sample Initial nitrogen: Thickness=[2000]; NO3=[1000]; NH4=[3]; NO3Units=kgha; NH4Units=ppm; SWUnits=Volumetric; OCUnits=Total; PHUnits=Water
          InitialWater Initial water: FractionFull=1; PercentMethod=FilledFromTop
          Swim: same as SWcon.swcon_Awatere191.paddock.Awatere_19a1.Swim
        outputfile: filename=swcon_ApsimVYc11.out; title=swcon_ApsimVYc11
          variables
            variables: dd/mm/yyyy as Date, rain, es, sw(6-10), dul(6-10), sat(6-10)
          events Reporting Frequency: event=daily
        manager ClimateControl: same as SWcon.swcon_Awatere191.paddock.ClimateControl
    simulation swcon_Rangitata671
      metfile met: filename=lincoln.met
      clock
        start_date = 01/06/2009  # Enter the start date of the simulation
        end_date = 30/05/2010  # Enter the end date of the simulation
      summaryfile
      area paddock
        surfaceom surface organic matter
          PoolName = barley  # Organic Matter pool name
          type = barley  # Organic Matter type
          mass = 500  # Initial surface residue (kg/ha)
          cnr = 80  # C:N ratio of initial residue
          standing_fraction = 1  # Fraction of residue standing
        Soil Rangitata_67a1: SoilType=Typic Fluvial Recent Soils; Latitude=-41; Longitude=-82; YearOfSampling=0
          LayerStructure
            Thickness=[10.0, 20.0, 30.0, 40.0, 122.0, 122.0, 122.0, 122.0, 122.0, 122.0, 122.0, 122.0, 122.0, 122.0, 122.0, 122.0, 122.0, 122.0, 122.0, 50.0, 20.0]
          Water: Thickness=[2000]; BD=[2.34525]; AirDry=[0.006105]; LL15=[0.0066]; DUL=[0.029]; SAT=[0.10695]; KS=[3600]
            SoilCrop Ryegrass_Clover: Thickness=[2000]; LL=[0.0066]; KL=[0.0001983]; XF=[0.0748701]
            SoilCrop Wheat: Thickness=[2000]; LL=[0.007]; KL=[0.2]; XF=[1]
          SoilOrganicMatter: same as SWcon.swcon_Awatere191.paddock.Awatere_19a1.SoilOrganicMatter
          Analysis: Thickness=[2000.0]; Rocks=[80.0]; PH=[7.0]; CEC=[11.645]; ParticleSizeSand=[90.0]; ParticleSizeSilt=[8.0]; ParticleSizeClay=[2.0]
          Sample Initial nitrogen: Thickness=[2000]; NO3=[1000]; NH4=[3]; NO3Units=kgha; NH4Units=ppm; SWUnits=Volumetric; OCUnits=Total; PHUnits=Water
          InitialWater Initial water: FractionFull=1; PercentMethod=FilledFromTop
          Swim: same as SWcon.swcon_Awatere191.paddock.Awatere_19a1.Swim
        outputfile: filename=swcon_Rangitata671.out; title=swcon_Rangitata671
          variables
            variables: dd/mm/yyyy as Date, rain, es, sw(6-10), dul(6-10), sat(6-10)
          events Reporting Frequency: event=daily
        manager ClimateControl: same as SWcon.swcon_Awatere191.paddock.ClimateControl
    simulation swcon_Mataikona301
      metfile met: filename=lincoln.met
      clock
        start_date = 01/06/2009  # Enter the start date of the simulation
        end_date = 30/05/2010  # Enter the end date of the simulation
      summaryfile
      area paddock
        surfaceom surface organic matter
          PoolName = barley  # Organic Matter pool name
          type = barley  # Organic Matter type
          mass = 500  # Initial surface residue (kg/ha)
          cnr = 80  # C:N ratio of initial residue
          standing_fraction = 1  # Fraction of residue standing
        Soil Mataikona_30a1: SoilType=Acidic Orthic Brown Soils; Latitude=-41; Longitude=-82
          LayerStructure
            Thickness=[10.0, 20.0, 30.0, 40.0, 122.0, 122.0, 122.0, 122.0, 122.0, 122.0, 122.0, 122.0, 122.0, 122.0, 122.0, 122.0, 122.0, 122.0, 122.0, 50.0, 20.0]
          Water: Thickness=[2000]; BD=[1.3356]; AirDry=[0.26455]; LL15=[0.286]; DUL=[0.398]; SAT=[0.46128]; KS=[360]
            SoilCrop Ryegrass_Clover: Thickness=[2000]; LL=[0.286]; KL=[0.000185906]; XF=[0.0463284]
            SoilCrop Wheat: Thickness=[2000]; LL=[0.286]; KL=[0.2]; XF=[1]
          SoilOrganicMatter: same as SWcon.swcon_Awatere191.paddock.Awatere_19a1.SoilOrganicMatter
          Analysis: Thickness=[2000.0]; Rocks=[0.0]; PH=[7.0]; CEC=[24.605]; ParticleSizeSand=[10.0]; ParticleSizeSilt=[50.0]; ParticleSizeClay=[40.0]
          Sample Initial nitrogen: Thickness=[2000]; NO3=[1000]; NH4=[3]; NO3Units=kgha; NH4Units=ppm; SWUnits=Volumetric; OCUnits=Total; PHUnits=Water
          InitialWater Initial water: FractionFull=1; PercentMethod=FilledFromTop
          Swim: same as SWcon.swcon_Awatere191.paddock.Awatere_19a1.Swim
        outputfile: filename=swcon_Mataikona301.out; title=swcon_Mataikona301
          variables
            variables: dd/mm/yyyy as Date, rain, es, sw(6-10), dul(6-10), sat(6-10)
          events Reporting Frequency: event=daily
        manager ClimateControl: same as SWcon.swcon_Awatere191.paddock.ClimateControl
    simulation swcon_Ayreburn171
      metfile met: filename=lincoln.met
      clock
        start_date = 01/06/2009  # Enter the start date of the simulation
        end_date = 30/05/2010  # Enter the end date of the simulation
      summaryfile
      area paddock
        surfaceom surface organic matter
          PoolName = barley  # Organic Matter pool name
          type = barley  # Organic Matter type
          mass = 500  # Initial surface residue (kg/ha)
          cnr = 80  # C:N ratio of initial residue
          standing_fraction = 1  # Fraction of residue standing
        Soil Ayreburn_17a1: SoilType=Argillic Orthic Gley Soils; Latitude=-41; Longitude=-82
          LayerStructure
            Thickness=[10.0, 20.0, 30.0, 40.0, 122.0, 122.0, 122.0, 122.0, 122.0, 122.0, 122.0, 122.0, 122.0, 122.0, 122.0, 122.0, 122.0, 122.0, 122.0, 50.0, 20.0]
          Water: Thickness=[2000]; BD=[1.0759]; AirDry=[0.300625]; LL15=[0.325]; DUL=[0.528]; SAT=[0.55242]; KS=[72]
            SoilCrop Ryegrass_Clover: Thickness=[2000]; LL=[0.325]; KL=[0.000148725]; XF=[0.120996]
            SoilCrop Wheat: Thickness=[2000]; LL=[0.325]; KL=[0.2]; XF=[1]
          SoilOrganicMatter: same as SWcon.swcon_Awatere191.paddock.Awatere_19a1.SoilOrganicMatter
          Analysis: Thickness=[2000.0]; Rocks=[0.0]; PH=[7.0]; CEC=[27.739]; ParticleSizeSand=[8.0]; ParticleSizeSilt=[37.0]; ParticleSizeClay=[55.0]
          Sample Initial nitrogen: Thickness=[2000]; NO3=[1000]; NH4=[3]; NO3Units=kgha; NH4Units=ppm; SWUnits=Volumetric; OCUnits=Total; PHUnits=Water
          InitialWater Initial water: FractionFull=1; PercentMethod=FilledFromTop
          Swim: same as SWcon.swcon_Awatere191.paddock.Awatere_19a1.Swim
        outputfile: filename=swcon_Ayreburn171.out; title=swcon_Ayreburn171
          variables
            variables: dd/mm/yyyy as Date, rain, es, sw(6-10), dul(6-10), sat(6-10)
          events Reporting Frequency: event=daily
        manager ClimateControl: same as SWcon.swcon_Awatere191.paddock.ClimateControl
    simulation swcon_Otorohanga571
      metfile met: filename=lincoln.met
      clock
        start_date = 01/06/2009  # Enter the start date of the simulation
        end_date = 30/05/2010  # Enter the end date of the simulation
      summaryfile
      area paddock
        surfaceom surface organic matter
          PoolName = barley  # Organic Matter pool name
          type = barley  # Organic Matter type
          mass = 500  # Initial surface residue (kg/ha)
          cnr = 80  # C:N ratio of initial residue
          standing_fraction = 1  # Fraction of residue standing
        Soil Otorohanga_57a1: SoilType=Typic Orthic Allophanic Soils; Latitude=-41; Longitude=-82
          memo Warning_MissingParameters
            Smap was not able to supply a complete set of parameters. You will need to provide your own estimation for these parameters to make the soil operational.  See the memo under Water section for further details.
          LayerStructure
            Thickness=[10.0, 20.0, 30.0, 40.0, 122.0, 122.0, 122.0, 122.0, 122.0, 122.0, 122.0, 122.0, 122.0, 122.0, 122.0, 122.0, 122.0, 122.0, 122.0, 50.0, 20.0]
          Water: Thickness=[2000]; BD=[0.82945]; AirDry=[0.259]; LL15=[0.28]; DUL=[0.508]; SAT=[0.63891]; KS=[960]
            SoilCrop Ryegrass_Clover: Thickness=[2000]; LL=[0.28]; KL=[0.000185906]; XF=[0.0588949]
            SoilCrop Wheat: Thickness=[2000]; LL=[0.28]; KL=[0.2]; XF=[1]
            memo Handling_MissingParameters
              The following tags are missing Smap parameters: KS. You will need to provide your own estimation for the parameters with the dummy -12345.67 value.
          SoilOrganicMatter: same as SWcon.swcon_Awatere191.paddock.Awatere_19a1.SoilOrganicMatter
          Analysis: Thickness=[2000.0]; Rocks=[0.0]; PH=[7.0]; CEC=[19.26]; ParticleSizeSand=[45.0]; ParticleSizeSilt=[30.0]; ParticleSizeClay=[25.0]
          Sample Initial nitrogen: Thickness=[2000]; NO3=[1000]; NH4=[3]; NO3Units=kgha; NH4Units=ppm; SWUnits=Volumetric; OCUnits=Total; PHUnits=Water
          InitialWater Initial water: FractionFull=1; PercentMethod=FilledFromTop
          Swim: same as SWcon.swcon_Awatere191.paddock.Awatere_19a1.Swim
        outputfile: filename=swcon_Otorohanga571.out; title=swcon_Otorohanga571
          variables
            variables: dd/mm/yyyy as Date, rain, es, sw(6-10), dul(6-10), sat(6-10)
          events Reporting Frequency: event=daily
        manager ClimateControl: same as SWcon.swcon_Awatere191.paddock.ClimateControl
    simulation swcon_Turangi401
      metfile met: filename=lincoln.met
      clock
        start_date = 01/06/2009  # Enter the start date of the simulation
        end_date = 30/05/2010  # Enter the end date of the simulation
      summaryfile
      area paddock
        surfaceom surface organic matter
          PoolName = barley  # Organic Matter pool name
          type = barley  # Organic Matter type
          mass = 500  # Initial surface residue (kg/ha)
          cnr = 80  # C:N ratio of initial residue
          standing_fraction = 1  # Fraction of residue standing
        Soil Turangi_40a1: SoilType=Typic Orthic Pumice Soils; Latitude=-41; Longitude=-82
          memo Warning_MissingParameters
            Smap was not able to supply a complete set of parameters. You will need to provide your own estimation for these parameters to make the soil operational.  See the memo under Water section for further details.
          LayerStructure
            Thickness=[10.0, 20.0, 30.0, 40.0, 122.0, 122.0, 122.0, 122.0, 122.0, 122.0, 122.0, 122.0, 122.0, 122.0, 122.0, 122.0, 122.0, 122.0, 122.0, 50.0, 20.0]
          Water: Thickness=[2000]; BD=[1.0918]; AirDry=[0.061975]; LL15=[0.067]; DUL=[0.214]; SAT=[0.54684]; KS=[1920]
            SoilCrop Ryegrass_Clover: Thickness=[2000]; LL=[0.067]; KL=[0.000223088]; XF=[0.0225505]
            SoilCrop Wheat: Thickness=[2000]; LL=[0.067]; KL=[0.2]; XF=[1]
            memo Handling_MissingParameters
              The following tags are missing Smap parameters: KS. You will need to provide your own estimation for the parameters with the dummy -12345.67 value.
          SoilOrganicMatter: same as SWcon.swcon_Awatere191.paddock.Awatere_19a1.SoilOrganicMatter
          Analysis: Thickness=[2000.0]; Rocks=[0.0]; PH=[7.0]; CEC=[11.979]; ParticleSizeSand=[88.0]; ParticleSizeSilt=[9.0]; ParticleSizeClay=[3.0]
          Sample Initial nitrogen: Thickness=[2000]; NO3=[1000]; NH4=[3]; NO3Units=kgha; NH4Units=ppm; SWUnits=Volumetric; OCUnits=Total; PHUnits=Water
          InitialWater Initial water: FractionFull=1; PercentMethod=FilledFromTop
          Swim: same as SWcon.swcon_Awatere191.paddock.Awatere_19a1.Swim
        outputfile: filename=swcon_Turangi401.out; title=swcon_Turangi401
          variables
            variables: dd/mm/yyyy as Date, rain, es, sw(6-10), dul(6-10), sat(6-10)
          events Reporting Frequency: event=daily
        manager ClimateControl: same as SWcon.swcon_Awatere191.paddock.ClimateControl
    simulation swcon_Taupo971
      metfile met: filename=lincoln.met
      clock
        start_date = 01/06/2009  # Enter the start date of the simulation
        end_date = 30/05/2010  # Enter the end date of the simulation
      summaryfile
      area paddock
        surfaceom surface organic matter
          PoolName = barley  # Organic Matter pool name
          type = barley  # Organic Matter type
          mass = 500  # Initial surface residue (kg/ha)
          cnr = 80  # C:N ratio of initial residue
          standing_fraction = 1  # Fraction of residue standing
        Soil Taupo_97a1: SoilType=Immature Orthic Pumice Soils; Latitude=-41; Longitude=-82; YearOfSampling=0
          memo Warning_MissingParameters
            Smap was not able to supply a complete set of parameters. You will need to provide your own estimation for these parameters to make the soil operational.  See the memo under Water section for further details.
          LayerStructure
            Thickness=[10.0, 20.0, 30.0, 40.0, 122.0, 122.0, 122.0, 122.0, 122.0, 122.0, 122.0, 122.0, 122.0, 122.0, 122.0, 122.0, 122.0, 122.0, 122.0, 50.0, 20.0]
          Water: Thickness=[2000]; BD=[1.0971]; AirDry=[0.0555]; LL15=[0.06]; DUL=[0.212]; SAT=[0.54498]; KS=[2400]
            SoilCrop Ryegrass_Clover: Thickness=[2000]; LL=[0.06]; KL=[0.000223088]; XF=[0.0364432]
            SoilCrop Wheat: Thickness=[2000]; LL=[0.06]; KL=[0.2]; XF=[1]
            memo Handling_MissingParameters
              The following tags are missing Smap parameters: KS. You will need to provide your own estimation for the parameters with the dummy -12345.67 value.
          SoilOrganicMatter: same as SWcon.swcon_Awatere191.paddock.Awatere_19a1.SoilOrganicMatter
          Analysis: Thickness=[2000.0]; Rocks=[0.0]; PH=[7.0]; CEC=[11.98]; ParticleSizeSand=[85.0]; ParticleSizeSilt=[13.0]; ParticleSizeClay=[2.0]
          Sample Initial nitrogen: Thickness=[2000]; NO3=[1000]; NH4=[3]; NO3Units=kgha; NH4Units=ppm; SWUnits=Volumetric; OCUnits=Total; PHUnits=Water
          InitialWater Initial water: FractionFull=1; PercentMethod=FilledFromTop
          Swim: same as SWcon.swcon_Awatere191.paddock.Awatere_19a1.Swim
        outputfile: filename=swcon_Taupo971.out; title=swcon_Taupo971
          variables
            variables: dd/mm/yyyy as Date, rain, es, sw(6-10), dul(6-10), sat(6-10)
          events Reporting Frequency: event=daily
        manager ClimateControl: same as SWcon.swcon_Awatere191.paddock.ClimateControl
    simulation swcon_TeToka81
      metfile met: filename=lincoln.met
      clock
        start_date = 01/06/2009  # Enter the start date of the simulation
        end_date = 30/05/2010  # Enter the end date of the simulation
      summaryfile
      area paddock
        surfaceom surface organic matter
          PoolName = barley  # Organic Matter pool name
          type = barley  # Organic Matter type
          mass = 500  # Initial surface residue (kg/ha)
          cnr = 80  # C:N ratio of initial residue
          standing_fraction = 1  # Fraction of residue standing
        Soil Te Toka_8a1: SoilType=Typic Orthic Pumice Soils; Latitude=-41; Longitude=-82; YearOfSampling=0
          memo Warning_MissingParameters
            Smap was not able to supply a complete set of parameters. You will need to provide your own estimation for these parameters to make the soil operational.  See the memo under Water section for further details.
          LayerStructure
            Thickness=[10, 20, 30, 40, 122, 122, 122, 122, 122, 122, 122, 122, 122, 122, 122, 122, 122, 122, 122, 50, 20]
          Water: Thickness=[2000]; BD=[0.92485]; AirDry=[0.22385]; LL15=[0.242]; DUL=[0.437]; SAT=[0.60543]; KS=[1920]
            SoilCrop Ryegrass_Clover: Thickness=[2000]; LL=[0.242]; KL=[0.000223088]; XF=[0.0225505]
            SoilCrop Wheat: Thickness=[2000]; LL=[0.242]; KL=[0.2]; XF=[1]
            memo Handling_MissingParameters
              The following tags are missing Smap parameters: KS. You will need to provide your own estimation for the parameters with the dummy -12345.67 value.
          SoilOrganicMatter: same as SWcon.swcon_Awatere191.paddock.Awatere_19a1.SoilOrganicMatter
          Analysis: Thickness=[2000.0]; Rocks=[0.0]; PH=[7.0]; CEC=[17.19]; ParticleSizeSand=[55.0]; ParticleSizeSilt=[27.0]; ParticleSizeClay=[18.0]
          Sample Initial nitrogen: Thickness=[2000]; NO3=[1000]; NH4=[3]; NO3Units=kgha; NH4Units=ppm; SWUnits=Volumetric; OCUnits=Total; PHUnits=Water
          InitialWater Initial water: FractionFull=1; PercentMethod=FilledFromTop
          Swim: same as SWcon.swcon_Awatere191.paddock.Awatere_19a1.Swim
        outputfile: filename=swcon_TeToka81.out; title=swcon_TeToka81
          variables
            variables: dd/mm/yyyy as Date, rain, es, sw(6-10), dul(6-10), sat(6-10)
          events Reporting Frequency: event=daily
        manager ClimateControl: same as SWcon.swcon_Awatere191.paddock.ClimateControl
  folder KL
    simulation kl_Awatere192
      metfile met: filename=lincoln.met
      clock
        start_date = 01/06/2009  # Enter the start date of the simulation
        end_date = 30/05/2010  # Enter the end date of the simulation
      summaryfile
      area paddock
        surfaceom surface organic matter
          PoolName = barley  # Organic Matter pool name
          type = barley  # Organic Matter type
          mass = 500  # Initial surface residue (kg/ha)
          cnr = 80  # C:N ratio of initial residue
          standing_fraction = 1  # Fraction of residue standing
        outputfile: filename=kl_Awatere192.out; title=kl_Awatere192
          variables
            variables: dd/mm/yyyy as Date, rain, es, sw(6-10), cover_green, root_depth, rlv(6-10), ep, pet_total, irrigation, dul(6-10), ll15(6-10)
          events Reporting Frequency: event=daily
        slurp
        manager ClimateControl
          # Climate Control Window
          date1 = 1-jun  # Enter window START date (dd-mmm)
          date2 = 15-sep  # Enter window END date (dd-mmm)
          # Climate Change Parameters
          MaxtChange = 1  # Change in maximum temperature (oC)
          MintChange = 1  # Change in minimum temperature (oC)
          RainChange = -10  # Relative change in daily rainfall (%)
          RadnChange = 0  # Relative change in daily radiation (%)
          CO2 = 350  # Atmospheric CO2 Concentration (ppm)
          on prenewmet:
```
if (date_within('[date1], [date2]') = 1) then
   maxt = 25
   mint = 15
   rain = 0
   radn = 30
   vp = 10
endif

if (date_within('[date1], [date2]') = 0) then
   maxt = 25
   mint = 15
   rain = 0
   radn = 30
   vp = 10
endif
```
          on Init:
```
co2 = [CO2]
tav = tav + ([MaxtChange] + [MintChange]) / 2
```
        manager Sow on a fixed date
          # Sowing criteria
          date = 1-jun  # Enter sowing date (dd-mmm)
          # Sowing parameters
          crop = wheat  # Enter name of crop to sow
          density = 250  # Enter sowing density (plants/m2)
          depth = 20  # Enter sowing depth (mm)
          cultivar = Wakaniu  # Enter cultivar
          class = plant  # Enter crop growth class
          row_spacing = 15  # Enter row spacing (mm)
          on start_of_day:
```
        if (today = date('[date]') then
              [crop] sow plants =[density], sowing_depth = [depth], cultivar = [cultivar], row_spacing = [row_spacing], crop_class = [class]
         endif
```
        manager Fertilise on fixed date
          # When should fertiliser be applied
          fert_date = 15-sep  # Enter fertiliser date (dd-mmm)
          fert_criteria = 5000  # Don't add fertiliser if N in top 2 layers exceeds (kg/ha)
          # Fertiliser application details
          fertmodule = Fertiliser  # Module used to apply the fertiliser
          fert_amount = 1000  # Amount of fertiliser to apply (kg/ha)
          fert_type = urea_N  # Fertiliser type
          on start_of_day:
```
         if (today = date('[fert_date]') then
            N_topsoil = no3(1) + nh4(1) + no3(2) + nh4(2)
            if (N_topsoil < [fert_criteria]) then
               [fertmodule] apply amount = [fert_amount] (kg/ha), depth = 50 (mm), type = [fert_type] ()
            endif
         endif
```
        wheat
          ModifyKL = yes  # Modify KL using CL, EC or ESP if found?
          MaxRootDepth = 0  # Maximum rooting depth (mm) 0=no restriction
        fertiliser
        micromet: soilalbedo=0.23; a_interception=0.0; b_interception=0.0; c_interception=0.0; d_interception=0.0
        irrigation
          automatic_irrigation = off
          asw_depth = 600  # Depth to which ASW is calculated. (mm)
          crit_fr_asw = .99  # Fraction of ASW below which irrigation is applied (0-1.0)
          irrigation_efficiency = 1  # Efficiency of the irrigation. (0-1.0)
          irrigation_allocation = off  # Allocation limits
          allocation = 0  # Allocation in mm
          default_no3_conc = 0.0  # Nitrate concentration (ppm N)
          default_nh4_conc = 0.0  # Ammonium concentration (ppm N)
          default_cl_conc = 0.0  # Chloride concentration (ppm Cl)
        manager2 Irrigate on sw deficit
          deficit = 1  # Irrigate when soil water deficit reaches this amount (mm)
          eff = 1.0  # Irrigation efficiency (0-1)
          start = 1-jun  # The earliest date irrigation will be applied (dd-mmm)
          end = 15-Sep  # The latest date irrigation will be applied (dd-mmm)
          maxlayer = 15  # The deficit will be calculated to this soil layer (0 for full profile)
          amount = 0  # Amount of irrigation to apply (0 for deficit)
```csharp
using System;
using ModelFramework;
using CSGeneral;

public class Script 
{      
   [Link] Irrigation Irrigation; 
   [Input] DateTime today;
   [Input] double[] dul_dep;     //drained upper limit (field capacity) 
   [Input] double[] sw_dep;      //soil water
   [Input] double[] ll15_dep;    //15 bar lower limit
   [Param] int deficit;          //allowable soil water deficit
   [Param] double eff;           //irrigation efficiency
   [Param] string start;         //no irrigation will be applied before this date
   [Param] string end;           //no irrigation will be applied after this date
   [Param] int maxlayer;         //calculate soil water deficit to this layer (inclusive)
   [Param] int amount;
   [Output] double totalSWD;     //total soil water deficit for given layers
   
   private double[] DulDep;
   private double[] SwDep;
   private double[] LL15Dep;
   private double[] SWD;
   
   [EventHandler] public void OnInitialised()
   {
      DulDep = new double[dul_dep.Length];
      SwDep = new double[dul_dep.Length];
      LL15Dep = new double[dul_dep.Length];
      SWD = new double[dul_dep.Length];
      
      if (maxlayer > dul_dep.Length)
      {
         Console.WriteLine("Warning: max layer is greater than number of layers.");
         Console.WriteLine("Using full profile for soil water deficit calculations.");
         maxlayer = 0;
      }
   }
     
   // The following event handler will be called each day at the beginning of the day
   [EventHandler] public void OnPrepare()
   {
      for (int i = 0; i < (maxlayer > 0 ? maxlayer : dul_dep.Length); i++)
      {
         SWD[i] = dul_dep[i] - sw_dep[i];
      }
      totalSWD = MathUtility.Sum(SWD);
      
      //if the soil water deficit is higer than the allowed deficit, and today is within the irrigation window
      if (totalSWD > deficit && DateUtility.WithinDates(start, today, end))
      {
         IrrigationApplicationType data = new IrrigationApplicationType(); //using a type means we can use defaults for values we don't change
         data.Amount = (int)totalSWD;
         Irrigation.Set("irrigation_efficiency", eff);
         Irrigation.Apply(data);
      }
   }  
}
```
        Soil Awatere_19a1: SoilType=Typic Fluvial Recent Soils; Latitude=-41; Longitude=-82
          LayerStructure
            Thickness=[10, 20, 30, 40, 122, 122, 122, 122, 122, 122, 122, 122, 122, 122, 122, 122, 122, 122, 122, 50, 20]
          Water: same as SWcon.swcon_Awatere191.paddock.Awatere_19a1.Water
          SoilOrganicMatter: same as SWcon.swcon_Awatere191.paddock.Awatere_19a1.SoilOrganicMatter
          Analysis: Thickness=[2000.0]; Rocks=[0.0]; PH=[7.0]; CEC=[11.779]; ParticleSizeSand=[88.0]; ParticleSizeSilt=[10.0]; ParticleSizeClay=[2.0]
          Sample Initial nitrogen: Thickness=[2000]; NO3=[1000]; NH4=[3]; NO3Units=kgha; NH4Units=ppm; SWUnits=Volumetric; OCUnits=Total; PHUnits=Water
          InitialWater Initial water: FractionFull=1; PercentMethod=FilledFromTop
          Swim: same as SWcon.swcon_Awatere191.paddock.Awatere_19a1.Swim
    simulation kl_Waikuku272
      metfile met: filename=lincoln.met
      clock
        start_date = 01/06/2009  # Enter the start date of the simulation
        end_date = 30/05/2010  # Enter the end date of the simulation
      summaryfile
      area paddock
        surfaceom surface organic matter
          PoolName = barley  # Organic Matter pool name
          type = barley  # Organic Matter type
          mass = 500  # Initial surface residue (kg/ha)
          cnr = 80  # C:N ratio of initial residue
          standing_fraction = 1  # Fraction of residue standing
        slurp
        manager ClimateControl: same as KL.kl_Awatere192.paddock.ClimateControl
        manager Sow on a fixed date: same as KL.kl_Awatere192.paddock.Sow on a fixed date
        manager Fertilise on fixed date: same as KL.kl_Awatere192.paddock.Fertilise on fixed date
        wheat
          ModifyKL = yes  # Modify KL using CL, EC or ESP if found?
          MaxRootDepth = 0  # Maximum rooting depth (mm) 0=no restriction
        fertiliser
        micromet: soilalbedo=0.23; a_interception=0.0; b_interception=0.0; c_interception=0.0; d_interception=0.0
        irrigation: same as KL.kl_Awatere192.paddock.Irrigation
        manager2 Irrigate on sw deficit: same as KL.kl_Awatere192.paddock.Irrigate on sw deficit
        Soil Waikuku_27a1: same as SWcon.swcon_Waikuku271.paddock.Waikuku_27a1
        outputfile: filename=kl_Waikuku272.out; title=kl_Waikuku272
          variables
            variables: dd/mm/yyyy as Date, rain, es, sw(6-10), cover_green, root_depth, rlv(6-10), ep, pet_total, irrigation, dul(6-10), ll15(6-10)
          events Reporting Frequency: event=daily
    simulation kl_Dannevirke402
      metfile met: filename=lincoln.met
      clock
        start_date = 01/06/2009  # Enter the start date of the simulation
        end_date = 30/05/2010  # Enter the end date of the simulation
      summaryfile
      area paddock
        surfaceom surface organic matter
          PoolName = barley  # Organic Matter pool name
          type = barley  # Organic Matter type
          mass = 500  # Initial surface residue (kg/ha)
          cnr = 80  # C:N ratio of initial residue
          standing_fraction = 1  # Fraction of residue standing
        slurp
        manager ClimateControl: same as KL.kl_Awatere192.paddock.ClimateControl
        manager Sow on a fixed date: same as KL.kl_Awatere192.paddock.Sow on a fixed date
        manager Fertilise on fixed date: same as KL.kl_Awatere192.paddock.Fertilise on fixed date
        wheat
          ModifyKL = yes  # Modify KL using CL, EC or ESP if found?
          MaxRootDepth = 0  # Maximum rooting depth (mm) 0=no restriction
        fertiliser
        micromet: soilalbedo=0.23; a_interception=0.0; b_interception=0.0; c_interception=0.0; d_interception=0.0
        irrigation: same as KL.kl_Awatere192.paddock.Irrigation
        manager2 Irrigate on sw deficit: same as KL.kl_Awatere192.paddock.Irrigate on sw deficit
        Soil Dannevirke_40a1: same as SWcon.swcon_Dannevirke401.paddock.Dannevirke_40a1
        outputfile: filename=kl_Dannevirke402.out; title=kl_Dannevirke402
          variables
            variables: dd/mm/yyyy as Date, rain, es, sw(6-10), cover_green, root_depth, rlv(6-10), ep, pet_total, irrigation, dul(6-10), ll15(6-10)
          events Reporting Frequency: event=daily
    simulation kl_Dannevirke392
      metfile met: filename=lincoln.met
      clock
        start_date = 01/06/2009  # Enter the start date of the simulation
        end_date = 30/05/2010  # Enter the end date of the simulation
      summaryfile
      area paddock
        surfaceom surface organic matter
          PoolName = barley  # Organic Matter pool name
          type = barley  # Organic Matter type
          mass = 500  # Initial surface residue (kg/ha)
          cnr = 80  # C:N ratio of initial residue
          standing_fraction = 1  # Fraction of residue standing
        slurp
        manager ClimateControl: same as KL.kl_Awatere192.paddock.ClimateControl
        manager Sow on a fixed date: same as KL.kl_Awatere192.paddock.Sow on a fixed date
        manager Fertilise on fixed date: same as KL.kl_Awatere192.paddock.Fertilise on fixed date
        wheat
          ModifyKL = yes  # Modify KL using CL, EC or ESP if found?
          MaxRootDepth = 0  # Maximum rooting depth (mm) 0=no restriction
        fertiliser
        micromet: soilalbedo=0.23; a_interception=0.0; b_interception=0.0; c_interception=0.0; d_interception=0.0
        irrigation: same as KL.kl_Awatere192.paddock.Irrigation
        manager2 Irrigate on sw deficit: same as KL.kl_Awatere192.paddock.Irrigate on sw deficit
        Soil Dannevirke_39a1: same as SWcon.swcon_Dannevirke391.paddock.Dannevirke_39a1
        outputfile: filename=kl_Dannevirke392.out; title=kl_Dannevirke392
          variables
            variables: dd/mm/yyyy as Date, rain, es, sw(6-10), cover_green, root_depth, rlv(6-10), ep, pet_total, irrigation, dul(6-10), ll15(6-10)
          events Reporting Frequency: event=daily
    simulation kl_Wakanui_462
      metfile met: filename=lincoln.met
      clock
        start_date = 01/06/2009  # Enter the start date of the simulation
        end_date = 30/05/2010  # Enter the end date of the simulation
      summaryfile
      area paddock
        surfaceom surface organic matter
          PoolName = barley  # Organic Matter pool name
          type = barley  # Organic Matter type
          mass = 500  # Initial surface residue (kg/ha)
          cnr = 80  # C:N ratio of initial residue
          standing_fraction = 1  # Fraction of residue standing
        slurp
        manager ClimateControl: same as KL.kl_Awatere192.paddock.ClimateControl
        manager Sow on a fixed date: same as KL.kl_Awatere192.paddock.Sow on a fixed date
        manager Fertilise on fixed date: same as KL.kl_Awatere192.paddock.Fertilise on fixed date
        wheat
          ModifyKL = yes  # Modify KL using CL, EC or ESP if found?
          MaxRootDepth = 0  # Maximum rooting depth (mm) 0=no restriction
        fertiliser
        micromet: soilalbedo=0.23; a_interception=0.0; b_interception=0.0; c_interception=0.0; d_interception=0.0
        irrigation: same as KL.kl_Awatere192.paddock.Irrigation
        manager2 Irrigate on sw deficit: same as KL.kl_Awatere192.paddock.Irrigate on sw deficit
        Soil Wakanui_46a1: same as SWcon.swcon_Wakanui_461.paddock.Wakanui_46a1
        outputfile: filename=kl_Wakanui_462.out; title=kl_Wakanui_462
          variables
            variables: dd/mm/yyyy as Date, rain, es, sw(6-10), cover_green, root_depth, rlv(6-10), ep, pet_total, irrigation, dul(6-10), ll15(6-10)
          events Reporting Frequency: event=daily
    simulation kl_Oronoko1282
      metfile met: filename=lincoln.met
      clock
        start_date = 01/06/2009  # Enter the start date of the simulation
        end_date = 30/05/2010  # Enter the end date of the simulation
      summaryfile
      area paddock
        surfaceom surface organic matter
          PoolName = barley  # Organic Matter pool name
          type = barley  # Organic Matter type
          mass = 500  # Initial surface residue (kg/ha)
          cnr = 80  # C:N ratio of initial residue
          standing_fraction = 1  # Fraction of residue standing
        slurp
        manager ClimateControl: same as KL.kl_Awatere192.paddock.ClimateControl
        manager Sow on a fixed date: same as KL.kl_Awatere192.paddock.Sow on a fixed date
        manager Fertilise on fixed date: same as KL.kl_Awatere192.paddock.Fertilise on fixed date
        wheat
          ModifyKL = yes  # Modify KL using CL, EC or ESP if found?
          MaxRootDepth = 0  # Maximum rooting depth (mm) 0=no restriction
        fertiliser
        micromet: soilalbedo=0.23; a_interception=0.0; b_interception=0.0; c_interception=0.0; d_interception=0.0
        irrigation: same as KL.kl_Awatere192.paddock.Irrigation
        manager2 Irrigate on sw deficit: same as KL.kl_Awatere192.paddock.Irrigate on sw deficit
        Soil Oronoko_128a1: same as SWcon.swcon_Oronoko1281.paddock.Oronoko_128a1
        outputfile: filename=kl_Oronoko1282.out; title=kl_Oronoko1282
          variables
            variables: dd/mm/yyyy as Date, rain, es, sw(6-10), cover_green, root_depth, rlv(6-10), ep, pet_total, irrigation, dul(6-10), ll15(6-10)
          events Reporting Frequency: event=daily
    simulation kl_Oronoko1292
      metfile met: filename=lincoln.met
      clock
        start_date = 01/06/2009  # Enter the start date of the simulation
        end_date = 30/05/2010  # Enter the end date of the simulation
      summaryfile
      area paddock
        surfaceom surface organic matter
          PoolName = barley  # Organic Matter pool name
          type = barley  # Organic Matter type
          mass = 500  # Initial surface residue (kg/ha)
          cnr = 80  # C:N ratio of initial residue
          standing_fraction = 1  # Fraction of residue standing
        slurp
        manager ClimateControl: same as KL.kl_Awatere192.paddock.ClimateControl
        manager Sow on a fixed date: same as KL.kl_Awatere192.paddock.Sow on a fixed date
        manager Fertilise on fixed date: same as KL.kl_Awatere192.paddock.Fertilise on fixed date
        wheat
          ModifyKL = yes  # Modify KL using CL, EC or ESP if found?
          MaxRootDepth = 0  # Maximum rooting depth (mm) 0=no restriction
        fertiliser
        micromet: soilalbedo=0.23; a_interception=0.0; b_interception=0.0; c_interception=0.0; d_interception=0.0
        irrigation: same as KL.kl_Awatere192.paddock.Irrigation
        manager2 Irrigate on sw deficit: same as KL.kl_Awatere192.paddock.Irrigate on sw deficit
        Soil Oronoko_129a1: same as SWcon.swcon_Oronoko1291.paddock.Oronoko_129a1
        outputfile: filename=kl_Oronoko1292.out; title=kl_Oronoko1292
          variables
            variables: dd/mm/yyyy as Date, rain, es, sw(6-10), cover_green, root_depth, rlv(6-10), ep, pet_total, irrigation, dul(6-10), ll15(6-10)
          events Reporting Frequency: event=daily
    simulation kl_Fork82
      metfile met: filename=lincoln.met
      clock
        start_date = 01/06/2009  # Enter the start date of the simulation
        end_date = 30/05/2010  # Enter the end date of the simulation
      summaryfile
      area paddock
        surfaceom surface organic matter
          PoolName = barley  # Organic Matter pool name
          type = barley  # Organic Matter type
          mass = 500  # Initial surface residue (kg/ha)
          cnr = 80  # C:N ratio of initial residue
          standing_fraction = 1  # Fraction of residue standing
        slurp
        manager ClimateControl: same as KL.kl_Awatere192.paddock.ClimateControl
        manager Sow on a fixed date: same as KL.kl_Awatere192.paddock.Sow on a fixed date
        manager Fertilise on fixed date: same as KL.kl_Awatere192.paddock.Fertilise on fixed date
        wheat
          ModifyKL = yes  # Modify KL using CL, EC or ESP if found?
          MaxRootDepth = 0  # Maximum rooting depth (mm) 0=no restriction
        fertiliser
        micromet: soilalbedo=0.23; a_interception=0.0; b_interception=0.0; c_interception=0.0; d_interception=0.0
        irrigation: same as KL.kl_Awatere192.paddock.Irrigation
        manager2 Irrigate on sw deficit: same as KL.kl_Awatere192.paddock.Irrigate on sw deficit
        Soil Fork_8a1: same as SWcon.swcon_Fork81.paddock.Fork_8a1
        outputfile: filename=kl_Fork82.out; title=kl_Fork82
          variables
            variables: dd/mm/yyyy as Date, rain, es, sw(6-10), cover_green, root_depth, rlv(6-10), ep, pet_total, irrigation, dul(6-10), ll15(6-10)
          events Reporting Frequency: event=daily
    simulation kl_Glasnevin132
      metfile met: filename=lincoln.met
      clock
        start_date = 01/06/2009  # Enter the start date of the simulation
        end_date = 30/05/2010  # Enter the end date of the simulation
      summaryfile
      area paddock
        surfaceom surface organic matter
          PoolName = barley  # Organic Matter pool name
          type = barley  # Organic Matter type
          mass = 500  # Initial surface residue (kg/ha)
          cnr = 80  # C:N ratio of initial residue
          standing_fraction = 1  # Fraction of residue standing
        slurp
        manager ClimateControl: same as KL.kl_Awatere192.paddock.ClimateControl
        manager Sow on a fixed date: same as KL.kl_Awatere192.paddock.Sow on a fixed date
        manager Fertilise on fixed date: same as KL.kl_Awatere192.paddock.Fertilise on fixed date
        wheat
          ModifyKL = yes  # Modify KL using CL, EC or ESP if found?
          MaxRootDepth = 0  # Maximum rooting depth (mm) 0=no restriction
        fertiliser
        micromet: soilalbedo=0.23; a_interception=0.0; b_interception=0.0; c_interception=0.0; d_interception=0.0
        irrigation: same as KL.kl_Awatere192.paddock.Irrigation
        manager2 Irrigate on sw deficit: same as KL.kl_Awatere192.paddock.Irrigate on sw deficit
        Soil Glasnevin_13a1: same as SWcon.swcon_Glasnevin131.paddock.Glasnevin_13a1
        outputfile: filename=kl_Glasnevin132.out; title=kl_Glasnevin132
          variables
            variables: dd/mm/yyyy as Date, rain, es, sw(6-10), cover_green, root_depth, rlv(6-10), ep, pet_total, irrigation, dul(6-10), ll15(6-10)
          events Reporting Frequency: event=daily
    simulation kl_Mandamus322
      metfile met: filename=lincoln.met
      clock
        start_date = 01/06/2009  # Enter the start date of the simulation
        end_date = 30/05/2010  # Enter the end date of the simulation
      summaryfile
      area paddock
        surfaceom surface organic matter
          PoolName = barley  # Organic Matter pool name
          type = barley  # Organic Matter type
          mass = 500  # Initial surface residue (kg/ha)
          cnr = 80  # C:N ratio of initial residue
          standing_fraction = 1  # Fraction of residue standing
        slurp
        manager ClimateControl: same as KL.kl_Awatere192.paddock.ClimateControl
        manager Sow on a fixed date: same as KL.kl_Awatere192.paddock.Sow on a fixed date
        manager Fertilise on fixed date: same as KL.kl_Awatere192.paddock.Fertilise on fixed date
        wheat
          ModifyKL = yes  # Modify KL using CL, EC or ESP if found?
          MaxRootDepth = 0  # Maximum rooting depth (mm) 0=no restriction
        fertiliser
        micromet: soilalbedo=0.23; a_interception=0.0; b_interception=0.0; c_interception=0.0; d_interception=0.0
        irrigation: same as KL.kl_Awatere192.paddock.Irrigation
        manager2 Irrigate on sw deficit: same as KL.kl_Awatere192.paddock.Irrigate on sw deficit
        Soil Mandamus_32a1: same as SWcon.swcon_Mandamus321.paddock.Mandamus_32a1
        outputfile: filename=kl_Mandamus322.out; title=kl_Mandamus322
          variables
            variables: dd/mm/yyyy as Date, rain, es, sw(6-10), cover_green, root_depth, rlv(6-10), ep, pet_total, irrigation, dul(6-10), ll15(6-10)
          events Reporting Frequency: event=daily
    simulation kl_ApsimVYc12
      metfile met: filename=lincoln.met
      clock
        start_date = 01/06/2009  # Enter the start date of the simulation
        end_date = 30/05/2010  # Enter the end date of the simulation
      summaryfile
      area paddock
        surfaceom surface organic matter
          PoolName = barley  # Organic Matter pool name
          type = barley  # Organic Matter type
          mass = 500  # Initial surface residue (kg/ha)
          cnr = 80  # C:N ratio of initial residue
          standing_fraction = 1  # Fraction of residue standing
        slurp
        manager ClimateControl: same as KL.kl_Awatere192.paddock.ClimateControl
        manager Sow on a fixed date: same as KL.kl_Awatere192.paddock.Sow on a fixed date
        manager Fertilise on fixed date: same as KL.kl_Awatere192.paddock.Fertilise on fixed date
        wheat
          ModifyKL = yes  # Modify KL using CL, EC or ESP if found?
          MaxRootDepth = 0  # Maximum rooting depth (mm) 0=no restriction
        fertiliser
        micromet: soilalbedo=0.23; a_interception=0.0; b_interception=0.0; c_interception=0.0; d_interception=0.0
        irrigation: same as KL.kl_Awatere192.paddock.Irrigation
        manager2 Irrigate on sw deficit
          deficit = 2  # Irrigate when soil water deficit reaches this amount (mm)
          eff = 1.0  # Irrigation efficiency (0-1)
          start = 1-jun  # The earliest date irrigation will be applied (dd-mmm)
          end = 15-Sep  # The latest date irrigation will be applied (dd-mmm)
          maxlayer = 15  # The deficit will be calculated to this soil layer (0 for full profile)
          amount = 0  # Amount of irrigation to apply (0 for deficit)
          script: same as in KL.kl_Awatere192.paddock.Irrigate on sw deficit
        Soil ApsimVYc_1a1: same as SWcon.swcon_ApsimVYc11.paddock.ApsimVYc_1a1
        outputfile: filename=kl_ApsimVYc12.out; title=kl_ApsimVYc12
          variables
            variables: dd/mm/yyyy as Date, rain, es, sw(6-10), cover_green, root_depth, rlv(6-10), ep, pet_total, irrigation, dul(6-10), ll15(6-10)
          events Reporting Frequency: event=daily
    simulation kl_Rangitata672
      metfile met: filename=lincoln.met
      clock
        start_date = 01/06/2009  # Enter the start date of the simulation
        end_date = 30/05/2010  # Enter the end date of the simulation
      summaryfile
      area paddock
        surfaceom surface organic matter
          PoolName = barley  # Organic Matter pool name
          type = barley  # Organic Matter type
          mass = 500  # Initial surface residue (kg/ha)
          cnr = 80  # C:N ratio of initial residue
          standing_fraction = 1  # Fraction of residue standing
        slurp
        manager ClimateControl: same as KL.kl_Awatere192.paddock.ClimateControl
        manager Sow on a fixed date: same as KL.kl_Awatere192.paddock.Sow on a fixed date
        manager Fertilise on fixed date: same as KL.kl_Awatere192.paddock.Fertilise on fixed date
        wheat
          ModifyKL = yes  # Modify KL using CL, EC or ESP if found?
          MaxRootDepth = 0  # Maximum rooting depth (mm) 0=no restriction
        fertiliser
        micromet: soilalbedo=0.23; a_interception=0.0; b_interception=0.0; c_interception=0.0; d_interception=0.0
        irrigation: same as KL.kl_Awatere192.paddock.Irrigation
        manager2 Irrigate on sw deficit: same as KL.kl_ApsimVYc12.paddock.Irrigate on sw deficit
        Soil Rangitata_67a1: same as SWcon.swcon_Rangitata671.paddock.Rangitata_67a1
        outputfile: filename=kl_Rangitata672.out; title=kl_Rangitata672
          variables
            variables: dd/mm/yyyy as Date, rain, es, sw(6-10), cover_green, root_depth, rlv(6-10), ep, pet_total, irrigation, dul(6-10), ll15(6-10)
          events Reporting Frequency: event=daily
    simulation kl_Mataikona302
      metfile met: filename=lincoln.met
      clock
        start_date = 01/06/2009  # Enter the start date of the simulation
        end_date = 30/05/2010  # Enter the end date of the simulation
      summaryfile
      area paddock
        surfaceom surface organic matter
          PoolName = barley  # Organic Matter pool name
          type = barley  # Organic Matter type
          mass = 500  # Initial surface residue (kg/ha)
          cnr = 80  # C:N ratio of initial residue
          standing_fraction = 1  # Fraction of residue standing
        slurp
        manager ClimateControl: same as KL.kl_Awatere192.paddock.ClimateControl
        manager Sow on a fixed date: same as KL.kl_Awatere192.paddock.Sow on a fixed date
        manager Fertilise on fixed date: same as KL.kl_Awatere192.paddock.Fertilise on fixed date
        wheat
          ModifyKL = yes  # Modify KL using CL, EC or ESP if found?
          MaxRootDepth = 0  # Maximum rooting depth (mm) 0=no restriction
        fertiliser
        micromet: soilalbedo=0.23; a_interception=0.0; b_interception=0.0; c_interception=0.0; d_interception=0.0
        irrigation: same as KL.kl_Awatere192.paddock.Irrigation
        manager2 Irrigate on sw deficit: same as KL.kl_ApsimVYc12.paddock.Irrigate on sw deficit
        Soil Mataikona_30a1: same as SWcon.swcon_Mataikona301.paddock.Mataikona_30a1
        outputfile: filename=kl_Mataikona302.out; title=kl_Mataikona302
          variables
            variables: dd/mm/yyyy as Date, rain, es, sw(6-10), cover_green, root_depth, rlv(6-10), ep, pet_total, irrigation, dul(6-10), ll15(6-10)
          events Reporting Frequency: event=daily
    simulation kl_Ayreburn172
      metfile met: filename=lincoln.met
      clock
        start_date = 01/06/2009  # Enter the start date of the simulation
        end_date = 30/05/2010  # Enter the end date of the simulation
      summaryfile
      area paddock
        surfaceom surface organic matter
          PoolName = barley  # Organic Matter pool name
          type = barley  # Organic Matter type
          mass = 500  # Initial surface residue (kg/ha)
          cnr = 80  # C:N ratio of initial residue
          standing_fraction = 1  # Fraction of residue standing
        slurp
        manager ClimateControl: same as KL.kl_Awatere192.paddock.ClimateControl
        manager Sow on a fixed date: same as KL.kl_Awatere192.paddock.Sow on a fixed date
        manager Fertilise on fixed date: same as KL.kl_Awatere192.paddock.Fertilise on fixed date
        wheat
          ModifyKL = yes  # Modify KL using CL, EC or ESP if found?
          MaxRootDepth = 0  # Maximum rooting depth (mm) 0=no restriction
        fertiliser
        micromet: soilalbedo=0.23; a_interception=0.0; b_interception=0.0; c_interception=0.0; d_interception=0.0
        irrigation: same as KL.kl_Awatere192.paddock.Irrigation
        manager2 Irrigate on sw deficit: same as KL.kl_ApsimVYc12.paddock.Irrigate on sw deficit
        Soil Ayreburn_17a1: same as SWcon.swcon_Ayreburn171.paddock.Ayreburn_17a1
        outputfile: filename=kl_Ayreburn172.out; title=kl_Ayreburn172
          variables
            variables: dd/mm/yyyy as Date, rain, es, sw(6-10), cover_green, root_depth, rlv(6-10), ep, pet_total, irrigation, dul(6-10), ll15(6-10)
          events Reporting Frequency: event=daily
    simulation kl_Otorohanga572
      metfile met: filename=lincoln.met
      clock
        start_date = 01/06/2009  # Enter the start date of the simulation
        end_date = 30/05/2010  # Enter the end date of the simulation
      summaryfile
      area paddock
        surfaceom surface organic matter
          PoolName = barley  # Organic Matter pool name
          type = barley  # Organic Matter type
          mass = 500  # Initial surface residue (kg/ha)
          cnr = 80  # C:N ratio of initial residue
          standing_fraction = 1  # Fraction of residue standing
        slurp
        manager ClimateControl: same as KL.kl_Awatere192.paddock.ClimateControl
        manager Sow on a fixed date: same as KL.kl_Awatere192.paddock.Sow on a fixed date
        manager Fertilise on fixed date: same as KL.kl_Awatere192.paddock.Fertilise on fixed date
        wheat
          ModifyKL = yes  # Modify KL using CL, EC or ESP if found?
          MaxRootDepth = 0  # Maximum rooting depth (mm) 0=no restriction
        fertiliser
        micromet: soilalbedo=0.23; a_interception=0.0; b_interception=0.0; c_interception=0.0; d_interception=0.0
        irrigation: same as KL.kl_Awatere192.paddock.Irrigation
        manager2 Irrigate on sw deficit: same as KL.kl_ApsimVYc12.paddock.Irrigate on sw deficit
        Soil Otorohanga_57a1: same as SWcon.swcon_Otorohanga571.paddock.Otorohanga_57a1
        outputfile: filename=kl_Otorohanga572.out; title=kl_Otorohanga572
          variables
            variables: dd/mm/yyyy as Date, rain, es, sw(6-10), cover_green, root_depth, rlv(6-10), ep, pet_total, irrigation, dul(6-10), ll15(6-10)
          events Reporting Frequency: event=daily
    simulation kl_Turangi402
      metfile met: filename=lincoln.met
      clock
        start_date = 01/06/2009  # Enter the start date of the simulation
        end_date = 30/05/2010  # Enter the end date of the simulation
      summaryfile
      area paddock
        surfaceom surface organic matter
          PoolName = barley  # Organic Matter pool name
          type = barley  # Organic Matter type
          mass = 500  # Initial surface residue (kg/ha)
          cnr = 80  # C:N ratio of initial residue
          standing_fraction = 1  # Fraction of residue standing
        slurp
        manager ClimateControl: same as KL.kl_Awatere192.paddock.ClimateControl
        manager Sow on a fixed date: same as KL.kl_Awatere192.paddock.Sow on a fixed date
        manager Fertilise on fixed date: same as KL.kl_Awatere192.paddock.Fertilise on fixed date
        wheat
          ModifyKL = yes  # Modify KL using CL, EC or ESP if found?
          MaxRootDepth = 0  # Maximum rooting depth (mm) 0=no restriction
        fertiliser
        micromet: soilalbedo=0.23; a_interception=0.0; b_interception=0.0; c_interception=0.0; d_interception=0.0
        irrigation: same as KL.kl_Awatere192.paddock.Irrigation
        manager2 Irrigate on sw deficit: same as KL.kl_ApsimVYc12.paddock.Irrigate on sw deficit
        Soil Turangi_40a1: same as SWcon.swcon_Turangi401.paddock.Turangi_40a1
        outputfile: filename=kl_Turangi402.out; title=kl_Turangi402
          variables
            variables: dd/mm/yyyy as Date, rain, es, sw(6-10), cover_green, root_depth, rlv(6-10), ep, pet_total, irrigation, dul(6-10), ll15(6-10)
          events Reporting Frequency: event=daily
    simulation kl_Taupo972
      metfile met: filename=lincoln.met
      clock
        start_date = 01/06/2009  # Enter the start date of the simulation
        end_date = 30/05/2010  # Enter the end date of the simulation
      summaryfile
      area paddock
        surfaceom surface organic matter
          PoolName = barley  # Organic Matter pool name
          type = barley  # Organic Matter type
          mass = 500  # Initial surface residue (kg/ha)
          cnr = 80  # C:N ratio of initial residue
          standing_fraction = 1  # Fraction of residue standing
        slurp
        manager ClimateControl: same as KL.kl_Awatere192.paddock.ClimateControl
        manager Sow on a fixed date: same as KL.kl_Awatere192.paddock.Sow on a fixed date
        manager Fertilise on fixed date: same as KL.kl_Awatere192.paddock.Fertilise on fixed date
        wheat
          ModifyKL = yes  # Modify KL using CL, EC or ESP if found?
          MaxRootDepth = 0  # Maximum rooting depth (mm) 0=no restriction
        fertiliser
        micromet: soilalbedo=0.23; a_interception=0.0; b_interception=0.0; c_interception=0.0; d_interception=0.0
        irrigation: same as KL.kl_Awatere192.paddock.Irrigation
        manager2 Irrigate on sw deficit: same as KL.kl_ApsimVYc12.paddock.Irrigate on sw deficit
        Soil Taupo_97a1: same as SWcon.swcon_Taupo971.paddock.Taupo_97a1
        outputfile: filename=kl_Taupo972.out; title=kl_Taupo972
          variables
            variables: dd/mm/yyyy as Date, rain, es, sw(6-10), cover_green, root_depth, rlv(6-10), ep, pet_total, irrigation, dul(6-10), ll15(6-10)
          events Reporting Frequency: event=daily
    simulation kl_TeToka82
      metfile met: filename=lincoln.met
      clock
        start_date = 01/06/2009  # Enter the start date of the simulation
        end_date = 30/05/2010  # Enter the end date of the simulation
      summaryfile
      area paddock
        surfaceom surface organic matter
          PoolName = barley  # Organic Matter pool name
          type = barley  # Organic Matter type
          mass = 500  # Initial surface residue (kg/ha)
          cnr = 80  # C:N ratio of initial residue
          standing_fraction = 1  # Fraction of residue standing
        slurp
        manager ClimateControl: same as KL.kl_Awatere192.paddock.ClimateControl
        manager Sow on a fixed date: same as KL.kl_Awatere192.paddock.Sow on a fixed date
        manager Fertilise on fixed date: same as KL.kl_Awatere192.paddock.Fertilise on fixed date
        wheat
          ModifyKL = yes  # Modify KL using CL, EC or ESP if found?
          MaxRootDepth = 0  # Maximum rooting depth (mm) 0=no restriction
        fertiliser
        micromet: soilalbedo=0.23; a_interception=0.0; b_interception=0.0; c_interception=0.0; d_interception=0.0
        irrigation: same as KL.kl_Awatere192.paddock.Irrigation
        manager2 Irrigate on sw deficit: same as KL.kl_ApsimVYc12.paddock.Irrigate on sw deficit
        Soil Te Toka_8a1: same as SWcon.swcon_TeToka81.paddock.Te Toka_8a1
        outputfile: filename=kl_TeToka82.out; title=kl_TeToka82
          variables
            variables: dd/mm/yyyy as Date, rain, es, sw(6-10), cover_green, root_depth, rlv(6-10), ep, pet_total, irrigation, dul(6-10), ll15(6-10)
          events Reporting Frequency: event=daily
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